**Harmonic (beam elements)
** Harmonic for damping ratio 0.01 (steel avg stressed)
**max deflection at f=9.71  Hz is about 1/(2*0.01)=50 of static (0.24 m)

*NODE, NSET=Nall
       1,0.000000000000e+00,0.000000000000e+00,0.000000000000e+00
       2,1.000000000000e+00,0.000000000000e+00,0.000000000000e+00
       3,1.200000000000e+00,0.000000000000e+00,0.000000000000e+00
       4,5.000000000000e-02,0.000000000000e+00,0.000000000000e+00
       5,1.000000000000e-01,0.000000000000e+00,0.000000000000e+00
       6,1.500000000000e-01,0.000000000000e+00,0.000000000000e+00
       7,2.000000000000e-01,0.000000000000e+00,0.000000000000e+00
       8,2.500000000000e-01,0.000000000000e+00,0.000000000000e+00
       9,3.000000000000e-01,0.000000000000e+00,0.000000000000e+00
      10,3.500000000000e-01,0.000000000000e+00,0.000000000000e+00
      11,4.000000000000e-01,0.000000000000e+00,0.000000000000e+00
      12,4.500000000000e-01,0.000000000000e+00,0.000000000000e+00
      13,5.000000000000e-01,0.000000000000e+00,0.000000000000e+00
      14,5.500000000000e-01,0.000000000000e+00,0.000000000000e+00
      15,6.000000000000e-01,0.000000000000e+00,0.000000000000e+00
      16,6.500000000000e-01,0.000000000000e+00,0.000000000000e+00
      17,7.000000000000e-01,0.000000000000e+00,0.000000000000e+00
      18,7.500000000000e-01,0.000000000000e+00,0.000000000000e+00
      19,8.000000000000e-01,0.000000000000e+00,0.000000000000e+00
      20,8.500000000000e-01,0.000000000000e+00,0.000000000000e+00
      21,9.000000000000e-01,0.000000000000e+00,0.000000000000e+00
      22,9.500000000000e-01,0.000000000000e+00,0.000000000000e+00
      23,1.050000000000e+00,0.000000000000e+00,0.000000000000e+00
      24,1.100000000000e+00,0.000000000000e+00,0.000000000000e+00
      25,1.150000000000e+00,0.000000000000e+00,0.000000000000e+00
      26,2.500000000000e-02,0.000000000000e+00,0.000000000000e+00
      27,7.500000000000e-02,0.000000000000e+00,0.000000000000e+00
      28,1.250000000000e-01,0.000000000000e+00,0.000000000000e+00
      29,1.750000000000e-01,0.000000000000e+00,0.000000000000e+00
      30,2.250000000000e-01,0.000000000000e+00,0.000000000000e+00
      31,2.750000000000e-01,0.000000000000e+00,0.000000000000e+00
      32,3.250000000000e-01,0.000000000000e+00,0.000000000000e+00
      33,3.750000000000e-01,0.000000000000e+00,0.000000000000e+00
      34,4.250000000000e-01,0.000000000000e+00,0.000000000000e+00
      35,4.750000000000e-01,0.000000000000e+00,0.000000000000e+00
      36,5.250000000000e-01,0.000000000000e+00,0.000000000000e+00
      37,5.750000000000e-01,0.000000000000e+00,0.000000000000e+00
      38,6.250000000000e-01,0.000000000000e+00,0.000000000000e+00
      39,6.750000000000e-01,0.000000000000e+00,0.000000000000e+00
      40,7.250000000000e-01,0.000000000000e+00,0.000000000000e+00
      41,7.750000000000e-01,0.000000000000e+00,0.000000000000e+00
      42,8.250000000000e-01,0.000000000000e+00,0.000000000000e+00
      43,8.750000000000e-01,0.000000000000e+00,0.000000000000e+00
      44,9.250000000000e-01,0.000000000000e+00,0.000000000000e+00
      45,9.750000000000e-01,0.000000000000e+00,0.000000000000e+00
      46,1.025000000000e+00,0.000000000000e+00,0.000000000000e+00
      47,1.075000000000e+00,0.000000000000e+00,0.000000000000e+00
      48,1.125000000000e+00,0.000000000000e+00,0.000000000000e+00
      49,1.175000000000e+00,0.000000000000e+00,0.000000000000e+00
*ELEMENT, TYPE=B32, ELSET=Eall
     1,      1,     26,      4
     2,      4,     27,      5
     3,      5,     28,      6
     4,      6,     29,      7
     5,      7,     30,      8
     6,      8,     31,      9
     7,      9,     32,     10
     8,     10,     33,     11
     9,     11,     34,     12
    10,     12,     35,     13
    11,     13,     36,     14
    12,     14,     37,     15
    13,     15,     38,     16
    14,     16,     39,     17
    15,     17,     40,     18
    16,     18,     41,     19
    17,     19,     42,     20
    18,     20,     43,     21
    19,     21,     44,     22
    20,     22,     45,      2
    21,      2,     46,     23
    22,     23,     47,     24
    23,     24,     48,     25
    24,     25,     49,      3
** Names based on load
*NSET,NSET=load
2,
3,
** Names based on mass
*ELSET,ELSET=mass
21,
22,
23,
24,
** Names based on beam
*ELSET,ELSET=beam
1,
2,
3,
4,
5,
6,
7,
8,
9,
10,
11,
12,
13,
14,
15,
16,
17,
18,
19,
20,
** Names based on B32
*ELSET,ELSET=B32R
1,
2,
3,
4,
5,
6,
7,
8,
9,
10,
11,
12,
13,
14,
15,
16,
17,
18,
19,
20,
21,
22,
23,
24,
** Names based on fixed
*NSET,NSET=fixed
1,

*MATERIAL,NAME=steel-no-dens
*ELASTIC
2.0000E+11,0.3


*DENSITY
0.0000E+00
*EXPANSION
0.0000E+00


*MATERIAL,NAME=steel
*ELASTIC
2.0000E+11,0.3


*DENSITY
7.8500E+03
*EXPANSION
0.0000E+00


*BEAM SECTION,MATERIAL=steel-no-dens,ELSET=beam,OFFSET1=0.0000E+00,OFFSET2=0.0000E+00,SECTION=rect
5.0000E-02,5.0000E-02
0.0000E+00,0.0000E+00,-1.0000E+00

*BEAM SECTION,MATERIAL=steel,ELSET=mass,OFFSET1=0.0000E+00,OFFSET2=0.0000E+00,SECTION=rect
2.0000E-01,2.0000E-01
0.0000E+00,0.0000E+00,-1.0000E+00

*BOUNDARY
fixed,1,1,0
fixed,2,2,0
fixed,3,3,0
fixed,4,4,0
fixed,5,5,0
fixed,6,6,0


*STEP
*FREQUENCY,SOLVER=ARPACK,STORAGE=YES
3

**load should be applied at this step too for beam elements
*CLOAD
load,3,-5.0000E+02


*END STEP
*STEP


*STEADY STATE DYNAMICS,HARMONIC=YES
1,15
*MODAL DAMPING
1,3,0.01

*CLOAD
load,3,-5.0000E+02

  *NODE FILE
PU,
  *EL FILE
PHS,
*END STEP
