**Modal Dynamic (beam elements)
** Calculation for damping ratio 0.01 (steel avg stressed)

*NODE, NSET=Nall
       1,0.000000000000e+00,0.000000000000e+00,0.000000000000e+00
       2,1.000000000000e+00,0.000000000000e+00,0.000000000000e+00
       3,1.200000000000e+00,0.000000000000e+00,0.000000000000e+00
       4,5.000000000000e-02,0.000000000000e+00,0.000000000000e+00
       5,1.000000000000e-01,0.000000000000e+00,0.000000000000e+00
       6,1.500000000000e-01,0.000000000000e+00,0.000000000000e+00
       7,2.000000000000e-01,0.000000000000e+00,0.000000000000e+00
       8,2.500000000000e-01,0.000000000000e+00,0.000000000000e+00
       9,3.000000000000e-01,0.000000000000e+00,0.000000000000e+00
      10,3.500000000000e-01,0.000000000000e+00,0.000000000000e+00
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*ELEMENT, TYPE=B32R, ELSET=Eall
     1,      1,     26,      4
     2,      4,     27,      5
     3,      5,     28,      6
     4,      6,     29,      7
     5,      7,     30,      8
     6,      8,     31,      9
     7,      9,     32,     10
     8,     10,     33,     11
     9,     11,     34,     12
    10,     12,     35,     13
    11,     13,     36,     14
    12,     14,     37,     15
    13,     15,     38,     16
    14,     16,     39,     17
    15,     17,     40,     18
    16,     18,     41,     19
    17,     19,     42,     20
    18,     20,     43,     21
    19,     21,     44,     22
    20,     22,     45,      2
    21,      2,     46,     23
    22,     23,     47,     24
    23,     24,     48,     25
    24,     25,     49,      3
** Names based on load
*NSET,NSET=load
2,
3,
** Names based on mass
*ELSET,ELSET=mass
21,
22,
23,
24,
** Names based on beam
*ELSET,ELSET=beam
1,
2,
3,
4,
5,
6,
7,
8,
9,
10,
11,
12,
13,
14,
15,
16,
17,
18,
19,
20,
** Names based on B32
*ELSET,ELSET=B32R
1,
2,
3,
4,
5,
6,
7,
8,
9,
10,
11,
12,
13,
14,
15,
16,
17,
18,
19,
20,
21,
22,
23,
24,
** Names based on fixed
*NSET,NSET=fixed
1,


*AMPLITUDE,NAME=Graph1
0,0.0000000E+00,
0.003003,1.8218914E-01,
0.006006,3.5827987E-01,
0.009009,5.2237790E-01,
0.012012,6.6899037E-01,
0.015015,7.9320974E-01,
0.018018,8.9087800E-01,
0.021021,9.5872590E-01,
0.024024,9.9448238E-01,
0.027027,9.9695055E-01,
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

*MATERIAL,NAME=steel-no-dens
*ELASTIC
2.0000E+11,0.3


*MATERIAL,NAME=steel
*ELASTIC
2.0000E+11,0.3

*DENSITY
7.8500E+03


*BEAM SECTION,MATERIAL=steel-no-dens,ELSET=beam,OFFSET1=0.0000E+00,OFFSET2=0.0000E+00,SECTION=rect
5.0000E-02,5.0000E-02
0.0000E+00,0.0000E+00,-1.0000E+00

*BEAM SECTION,MATERIAL=steel,ELSET=mass,OFFSET1=0.0000E+00,OFFSET2=0.0000E+00,SECTION=rect
2.0000E-01,2.0000E-01
0.0000E+00,0.0000E+00,-1.0000E+00


*BOUNDARY
1,1,3,0
4,1,3,0


*STEP
*FREQUENCY,SOLVER=ARPACK,STORAGE=YES
8


*CLOAD
load,3,-5.0000E+02


*END STEP
*STEP, inc=1000000
*MODAL DYNAMIC
0.0025,3


*MODAL DAMPING
1,8,0.01

*CLOAD,AMPLITUDE=Graph1
load,3,-5.0000E+02

*NODE FILE
U,
*EL FILE
S,
*END STEP
