*node, nset=Nall
1, 0.000000e+00, -2.500000e-02, 0.000000e+00
2, 0.000000e+00, 2.500000e-02, 0.000000e+00
3, 1.000000e-02, 2.500000e-02, 0.000000e+00
4, 1.000000e-02, -2.500000e-02, 0.000000e+00
5, 1.000000e+00, 2.500000e-02, 0.000000e+00
6, 1.000000e+00, -2.500000e-02, 0.000000e+00
7, 1.000000e+00, -1.000000e-01, 0.000000e+00
8, 1.200000e+00, -1.000000e-01, 0.000000e+00
9, 1.200000e+00, 1.000000e-01, 0.000000e+00
10, 1.000000e+00, 1.000000e-01, 0.000000e+00
11, 5.950000e-02, 2.500000e-02, 0.000000e+00
12, 1.090000e-01, 2.500000e-02, 0.000000e+00
13, 1.585000e-01, 2.500000e-02, 0.000000e+00
14, 2.080000e-01, 2.500000e-02, 0.000000e+00
15, 2.575000e-01, 2.500000e-02, 0.000000e+00
16, 3.070000e-01, 2.500000e-02, 0.000000e+00
17, 3.565000e-01, 2.500000e-02, 0.000000e+00
18, 4.060000e-01, 2.500000e-02, 0.000000e+00
19, 4.555000e-01, 2.500000e-02, 0.000000e+00
20, 5.050000e-01, 2.500000e-02, 0.000000e+00
21, 5.545000e-01, 2.500000e-02, 0.000000e+00
22, 6.040000e-01, 2.500000e-02, 0.000000e+00
23, 6.535000e-01, 2.500000e-02, 0.000000e+00
24, 7.030000e-01, 2.500000e-02, 0.000000e+00
25, 7.525000e-01, 2.500000e-02, 0.000000e+00
26, 8.020000e-01, 2.500000e-02, 0.000000e+00
27, 8.515000e-01, 2.500000e-02, 0.000000e+00
28, 9.010000e-01, 2.500000e-02, 0.000000e+00
29, 9.505000e-01, 2.500000e-02, 0.000000e+00
30, 5.950000e-02, -2.500000e-02, 0.000000e+00
31, 1.090000e-01, -2.500000e-02, 0.000000e+00
32, 1.585000e-01, -2.500000e-02, 0.000000e+00
33, 2.080000e-01, -2.500000e-02, 0.000000e+00
34, 2.575000e-01, -2.500000e-02, 0.000000e+00
35, 3.070000e-01, -2.500000e-02, 0.000000e+00
36, 3.565000e-01, -2.500000e-02, 0.000000e+00
37, 4.060000e-01, -2.500000e-02, 0.000000e+00
38, 4.555000e-01, -2.500000e-02, 0.000000e+00
39, 5.050000e-01, -2.500000e-02, 0.000000e+00
40, 5.545000e-01, -2.500000e-02, 0.000000e+00
41, 6.040000e-01, -2.500000e-02, 0.000000e+00
42, 6.535000e-01, -2.500000e-02, 0.000000e+00
43, 7.030000e-01, -2.500000e-02, 0.000000e+00
44, 7.525000e-01, -2.500000e-02, 0.000000e+00
45, 8.020000e-01, -2.500000e-02, 0.000000e+00
46, 8.515000e-01, -2.500000e-02, 0.000000e+00
47, 9.010000e-01, -2.500000e-02, 0.000000e+00
48, 9.505000e-01, -2.500000e-02, 0.000000e+00
49, 1.000000e+00, -6.250000e-02, 0.000000e+00
50, 1.050000e+00, -1.000000e-01, 0.000000e+00
51, 1.100000e+00, -1.000000e-01, 0.000000e+00
52, 1.150000e+00, -1.000000e-01, 0.000000e+00
53, 1.200000e+00, -5.000000e-02, 0.000000e+00
54, 1.200000e+00, 0.000000e+00, 0.000000e+00
55, 1.200000e+00, 5.000000e-02, 0.000000e+00
56, 1.000000e+00, 6.250000e-02, 0.000000e+00
57, 1.050000e+00, 1.000000e-01, 0.000000e+00
58, 1.100000e+00, 1.000000e-01, 0.000000e+00
59, 1.150000e+00, 1.000000e-01, 0.000000e+00
60, 1.050000e+00, -5.000000e-02, 0.000000e+00
61, 1.050000e+00, -6.938894e-18, 0.000000e+00
62, 1.050000e+00, 5.000000e-02, 0.000000e+00
63, 1.150000e+00, -5.000000e-02, 0.000000e+00
64, 1.100000e+00, -5.000000e-02, 0.000000e+00
65, 1.150000e+00, 0.000000e+00, 0.000000e+00
66, 1.100000e+00, -6.938894e-18, 0.000000e+00
67, 1.150000e+00, 5.000000e-02, 0.000000e+00
68, 1.100000e+00, 5.000000e-02, 0.000000e+00
69, 0.000000e+00, 0.000000e+00, 0.000000e+00
70, 5.000000e-03, 2.500000e-02, 0.000000e+00
71, 1.000000e-02, 0.000000e+00, 0.000000e+00
72, 5.000000e-03, -2.500000e-02, 0.000000e+00
73, 3.475000e-02, 2.500000e-02, 0.000000e+00
74, 8.425000e-02, 2.500000e-02, 0.000000e+00
75, 1.337500e-01, 2.500000e-02, 0.000000e+00
76, 1.832500e-01, 2.500000e-02, 0.000000e+00
77, 2.327500e-01, 2.500000e-02, 0.000000e+00
78, 2.822500e-01, 2.500000e-02, 0.000000e+00
79, 3.317500e-01, 2.500000e-02, 0.000000e+00
80, 3.812500e-01, 2.500000e-02, 0.000000e+00
81, 4.307500e-01, 2.500000e-02, 0.000000e+00
82, 4.802500e-01, 2.500000e-02, 0.000000e+00
83, 5.297500e-01, 2.500000e-02, 0.000000e+00
84, 5.792500e-01, 2.500000e-02, 0.000000e+00
85, 6.287500e-01, 2.500000e-02, 0.000000e+00
86, 6.782500e-01, 2.500000e-02, 0.000000e+00
87, 7.277500e-01, 2.500000e-02, 0.000000e+00
88, 7.772500e-01, 2.500000e-02, 0.000000e+00
89, 8.267500e-01, 2.500000e-02, 0.000000e+00
90, 8.762500e-01, 2.500000e-02, 0.000000e+00
91, 9.257500e-01, 2.500000e-02, 0.000000e+00
92, 9.752500e-01, 2.500000e-02, 0.000000e+00
93, 1.000000e+00, 0.000000e+00, 0.000000e+00
94, 3.475000e-02, -2.500000e-02, 0.000000e+00
95, 8.425000e-02, -2.500000e-02, 0.000000e+00
96, 1.337500e-01, -2.500000e-02, 0.000000e+00
97, 1.832500e-01, -2.500000e-02, 0.000000e+00
98, 2.327500e-01, -2.500000e-02, 0.000000e+00
99, 2.822500e-01, -2.500000e-02, 0.000000e+00
100, 3.317500e-01, -2.500000e-02, 0.000000e+00
101, 3.812500e-01, -2.500000e-02, 0.000000e+00
102, 4.307500e-01, -2.500000e-02, 0.000000e+00
103, 4.802500e-01, -2.500000e-02, 0.000000e+00
104, 5.297500e-01, -2.500000e-02, 0.000000e+00
105, 5.792500e-01, -2.500000e-02, 0.000000e+00
106, 6.287500e-01, -2.500000e-02, 0.000000e+00
107, 6.782500e-01, -2.500000e-02, 0.000000e+00
108, 7.277500e-01, -2.500000e-02, 0.000000e+00
109, 7.772500e-01, -2.500000e-02, 0.000000e+00
110, 8.267500e-01, -2.500000e-02, 0.000000e+00
111, 8.762500e-01, -2.500000e-02, 0.000000e+00
112, 9.257500e-01, -2.500000e-02, 0.000000e+00
113, 9.752500e-01, -2.500000e-02, 0.000000e+00
114, 1.000000e+00, -8.125000e-02, 0.000000e+00
115, 1.000000e+00, -4.375000e-02, 0.000000e+00
116, 1.025000e+00, -1.000000e-01, 0.000000e+00
117, 1.075000e+00, -1.000000e-01, 0.000000e+00
118, 1.125000e+00, -1.000000e-01, 0.000000e+00
119, 1.175000e+00, -1.000000e-01, 0.000000e+00
120, 1.200000e+00, -7.500000e-02, 0.000000e+00
121, 1.200000e+00, -2.500000e-02, 0.000000e+00
122, 1.200000e+00, 2.500000e-02, 0.000000e+00
123, 1.200000e+00, 7.500000e-02, 0.000000e+00
124, 1.000000e+00, 4.375000e-02, 0.000000e+00
125, 1.000000e+00, 8.125000e-02, 0.000000e+00
126, 1.025000e+00, 1.000000e-01, 0.000000e+00
127, 1.075000e+00, 1.000000e-01, 0.000000e+00
128, 1.125000e+00, 1.000000e-01, 0.000000e+00
129, 1.175000e+00, 1.000000e-01, 0.000000e+00
130, 5.950000e-02, 0.000000e+00, 0.000000e+00
131, 1.090000e-01, 0.000000e+00, 0.000000e+00
132, 1.585000e-01, 0.000000e+00, 0.000000e+00
133, 2.080000e-01, 0.000000e+00, 0.000000e+00
134, 2.575000e-01, 0.000000e+00, 0.000000e+00
135, 3.070000e-01, 0.000000e+00, 0.000000e+00
136, 3.565000e-01, 0.000000e+00, 0.000000e+00
137, 4.060000e-01, 0.000000e+00, 0.000000e+00
138, 4.555000e-01, 0.000000e+00, 0.000000e+00
139, 5.050000e-01, 0.000000e+00, 0.000000e+00
140, 5.545000e-01, 0.000000e+00, 0.000000e+00
141, 6.040000e-01, 0.000000e+00, 0.000000e+00
142, 6.535000e-01, 0.000000e+00, 0.000000e+00
143, 7.030000e-01, 0.000000e+00, 0.000000e+00
144, 7.525000e-01, 0.000000e+00, 0.000000e+00
145, 8.020000e-01, 0.000000e+00, 0.000000e+00
146, 8.515000e-01, 0.000000e+00, 0.000000e+00
147, 9.010000e-01, 0.000000e+00, 0.000000e+00
148, 9.505000e-01, 0.000000e+00, 0.000000e+00
149, 1.025000e+00, 5.625000e-02, 0.000000e+00
150, 1.050000e+00, 7.500000e-02, 0.000000e+00
151, 1.025000e+00, 3.750000e-02, 0.000000e+00
152, 1.025000e+00, -1.250000e-02, 0.000000e+00
153, 1.050000e+00, 2.500000e-02, 0.000000e+00
154, 1.025000e+00, -5.625000e-02, 0.000000e+00
155, 1.050000e+00, -2.500000e-02, 0.000000e+00
156, 1.050000e+00, -7.500000e-02, 0.000000e+00
157, 1.175000e+00, -5.000000e-02, 0.000000e+00
158, 1.150000e+00, -7.500000e-02, 0.000000e+00
159, 1.125000e+00, -5.000000e-02, 0.000000e+00
160, 1.100000e+00, -7.500000e-02, 0.000000e+00
161, 1.075000e+00, -5.000000e-02, 0.000000e+00
162, 1.175000e+00, 0.000000e+00, 0.000000e+00
163, 1.150000e+00, -2.500000e-02, 0.000000e+00
164, 1.125000e+00, -3.469447e-18, 0.000000e+00
165, 1.100000e+00, -2.500000e-02, 0.000000e+00
166, 1.075000e+00, -6.938894e-18, 0.000000e+00
167, 1.175000e+00, 5.000000e-02, 0.000000e+00
168, 1.150000e+00, 2.500000e-02, 0.000000e+00
169, 1.125000e+00, 5.000000e-02, 0.000000e+00
170, 1.100000e+00, 2.500000e-02, 0.000000e+00
171, 1.075000e+00, 5.000000e-02, 0.000000e+00
172, 1.150000e+00, 7.500000e-02, 0.000000e+00
173, 1.100000e+00, 7.500000e-02, 0.000000e+00
*nset, nset=load
8, 5, 6, 7, 9, 10, 93,
50, 51, 52, 116, 117, 118, 119, 49,
114, 115, 53, 54, 55, 120, 121, 122,
123, 57, 58, 59, 126, 127, 128, 129,
56, 124, 125, 60, 61, 62, 63, 64,
65, 66, 67, 68, 149, 150, 151, 152,
153, 154, 155, 156, 157, 158, 159, 160,
161, 162, 163, 164, 165, 166, 167, 168,
169, 170, 171, 172, 173,
*nset, nset=fixedlines
1, 2, 3, 4, 69, 71,
*element, elset=S6,type=S6
84, 56, 62, 5, 149, 151, 124,
*element, elset=Eall,type=S8
62, 2, 3, 4, 1, 70, 71, 72, 69,
63, 3, 11, 30, 4, 73, 130, 94, 71,
64, 11, 12, 31, 30, 74, 131, 95, 130,
65, 12, 13, 32, 31, 75, 132, 96, 131,
66, 13, 14, 33, 32, 76, 133, 97, 132,
67, 14, 15, 34, 33, 77, 134, 98, 133,
68, 15, 16, 35, 34, 78, 135, 99, 134,
69, 16, 17, 36, 35, 79, 136, 100, 135,
70, 17, 18, 37, 36, 80, 137, 101, 136,
71, 18, 19, 38, 37, 81, 138, 102, 137,
72, 19, 20, 39, 38, 82, 139, 103, 138,
73, 20, 21, 40, 39, 83, 140, 104, 139,
74, 21, 22, 41, 40, 84, 141, 105, 140,
75, 22, 23, 42, 41, 85, 142, 106, 141,
76, 23, 24, 43, 42, 86, 143, 107, 142,
77, 24, 25, 44, 43, 87, 144, 108, 143,
78, 25, 26, 45, 44, 88, 145, 109, 144,
79, 26, 27, 46, 45, 89, 146, 110, 145,
80, 27, 28, 47, 46, 90, 147, 111, 146,
81, 28, 29, 48, 47, 91, 148, 112, 147,
82, 29, 5, 6, 48, 92, 93, 113, 148,
83, 10, 57, 62, 56, 126, 150, 149, 125,
85, 5, 62, 61, 6, 151, 153, 152, 93,
86, 6, 61, 60, 49, 152, 155, 154, 115,
87, 49, 60, 50, 7, 154, 156, 116, 114,
88, 8, 52, 63, 53, 119, 158, 157, 120,
89, 52, 51, 64, 63, 118, 160, 159, 158,
90, 51, 50, 60, 64, 117, 156, 161, 160,
91, 53, 63, 65, 54, 157, 163, 162, 121,
92, 63, 64, 66, 65, 159, 165, 164, 163,
93, 64, 60, 61, 66, 161, 155, 166, 165,
94, 54, 65, 67, 55, 162, 168, 167, 122,
95, 65, 66, 68, 67, 164, 170, 169, 168,
96, 66, 61, 62, 68, 166, 153, 171, 170,
97, 55, 67, 59, 9, 167, 172, 129, 123,
98, 67, 68, 58, 59, 169, 173, 128, 172,
99, 68, 62, 57, 58, 171, 150, 127, 173,

*elset, elset=beam
63, 64, 65, 66, 67, 68, 69,
70, 71, 72, 73, 74, 75, 76, 77,
78, 79, 80, 81, 82, 62,
*elset, elset=mass
83, 84, 85, 86, 87, 88, 89,
90, 91, 92, 93, 94, 95, 96, 97,
98, 99,


*MATERIAL,NAME=steel-no-dens
*ELASTIC
2.0000E+11,0.3


*DENSITY
0.0000E+00


*MATERIAL,NAME=steel
*ELASTIC
2.0000E+11,0.3


*DENSITY
7.8500E+03


*SHELL SECTION,MATERIAL=steel-no-dens,ELSET=beam,,OFFSET=0.0000E+00
5.0000E-02

*SHELL SECTION,MATERIAL=steel,ELSET=mass,,OFFSET=0.0000E+00
2.0000E-01

*BOUNDARY
fixedlines,1,3,0


*STEP
*FREQUENCY,STORAGE=YES
3

**dummy load for proper eig file
*DLOAD
mass, P, 0

  *NODE FILE
U,


*END STEP
*STEP
*STEADY STATE DYNAMICS,HARMONIC=YES
1,15
*MODAL DAMPING
1,3,0.01

*DLOAD
mass, P, 2.500000e+04

  *NODE FILE
PU,
  *EL FILE
PHS,
*END STEP
