*node, nset=Nall
1, 0.000000e+00, -2.500000e-02, 0.000000e+00
2, 0.000000e+00, 2.500000e-02, 0.000000e+00
3, 1.000000e-02, 2.500000e-02, 0.000000e+00
4, 1.000000e-02, -2.500000e-02, 0.000000e+00
5, 1.000000e+00, 2.500000e-02, 0.000000e+00
6, 1.000000e+00, -2.500000e-02, 0.000000e+00
7, 1.000000e+00, -1.000000e-01, 0.000000e+00
8, 1.200000e+00, -1.000000e-01, 0.000000e+00
9, 1.200000e+00, 1.000000e-01, 0.000000e+00
10, 1.000000e+00, 1.000000e-01, 0.000000e+00
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*nset, nset=load
8, 5, 6, 7, 9, 10, 93,
50, 51, 52, 116, 117, 118, 119, 49,
114, 115, 53, 54, 55, 120, 121, 122,
123, 57, 58, 59, 126, 127, 128, 129,
56, 124, 125, 60, 61, 62, 63, 64,
65, 66, 67, 68, 149, 150, 151, 152,
153, 154, 155, 156, 157, 158, 159, 160,
161, 162, 163, 164, 165, 166, 167, 168,
169, 170, 171, 172, 173,
*nset, nset=fixedlines
1, 2, 3, 4, 69, 71,
*element, elset=S6,type=S6
84, 56, 62, 5, 149, 151, 124,
*element, elset=Eall,type=S8
62, 2, 3, 4, 1, 70, 71, 72, 69,
63, 3, 11, 30, 4, 73, 130, 94, 71,
64, 11, 12, 31, 30, 74, 131, 95, 130,
65, 12, 13, 32, 31, 75, 132, 96, 131,
66, 13, 14, 33, 32, 76, 133, 97, 132,
67, 14, 15, 34, 33, 77, 134, 98, 133,
68, 15, 16, 35, 34, 78, 135, 99, 134,
69, 16, 17, 36, 35, 79, 136, 100, 135,
70, 17, 18, 37, 36, 80, 137, 101, 136,
71, 18, 19, 38, 37, 81, 138, 102, 137,
72, 19, 20, 39, 38, 82, 139, 103, 138,
73, 20, 21, 40, 39, 83, 140, 104, 139,
74, 21, 22, 41, 40, 84, 141, 105, 140,
75, 22, 23, 42, 41, 85, 142, 106, 141,
76, 23, 24, 43, 42, 86, 143, 107, 142,
77, 24, 25, 44, 43, 87, 144, 108, 143,
78, 25, 26, 45, 44, 88, 145, 109, 144,
79, 26, 27, 46, 45, 89, 146, 110, 145,
80, 27, 28, 47, 46, 90, 147, 111, 146,
81, 28, 29, 48, 47, 91, 148, 112, 147,
82, 29, 5, 6, 48, 92, 93, 113, 148,
83, 10, 57, 62, 56, 126, 150, 149, 125,
85, 5, 62, 61, 6, 151, 153, 152, 93,
86, 6, 61, 60, 49, 152, 155, 154, 115,
87, 49, 60, 50, 7, 154, 156, 116, 114,
88, 8, 52, 63, 53, 119, 158, 157, 120,
89, 52, 51, 64, 63, 118, 160, 159, 158,
90, 51, 50, 60, 64, 117, 156, 161, 160,
91, 53, 63, 65, 54, 157, 163, 162, 121,
92, 63, 64, 66, 65, 159, 165, 164, 163,
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
*elset, elset=beam
63, 64, 65, 66, 67, 68, 69,
70, 71, 72, 73, 74, 75, 76, 77,
78, 79, 80, 81, 82, 62,
*elset, elset=mass
83, 84, 85, 86, 87, 88, 89,
90, 91, 92, 93, 94, 95, 96, 97,
98, 99,


*AMPLITUDE,NAME=Graph1
0,0.0000000E+00,
0.003003,1.8218914E-01,
0.006006,3.5827987E-01,
0.009009,5.2237790E-01,
0.012012,6.6899037E-01,
0.015015,7.9320974E-01,
0.018018,8.9087800E-01,
0.021021,9.5872590E-01,
0.024024,9.9448238E-01,
0.027027,9.9695055E-01,
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

*MATERIAL,NAME=steel-no-dens
*ELASTIC
2.0000E+11,0.3


*DENSITY
0.0000E+00


*MATERIAL,NAME=steel
*ELASTIC
2.0000E+11,0.3


*DENSITY
7.8500E+03


*SHELL SECTION,MATERIAL=steel-no-dens,ELSET=beam,,OFFSET=0.0000E+00
5.0000E-02

*SHELL SECTION,MATERIAL=steel,ELSET=mass,,OFFSET=0.0000E+00
2.0000E-01

*BOUNDARY
fixedlines,1,3,0


*STEP
*FREQUENCY,STORAGE=YES
3

**dummy load for proper eig file
*DLOAD
mass, P, 0

  *NODE FILE
U,

*END STEP


*STEP,INC=1000000
*MODAL DYNAMIC
0.0025,3
*MODAL DAMPING
1,3,0.01

*DLOAD,AMPLITUDE=graph1,TIME DELAY=0
mass, P, 2.500000e+04


  *NODE FILE,output=2d
U,
  *EL FILE
S,
*END STEP
