*NODE, NSET=Nall
       1,0.000000000000e+00,-2.500000000000e-02,0.000000000000e+00
       2,0.000000000000e+00,2.500000000000e-02,0.000000000000e+00
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*ELEMENT, TYPE=S8, ELSET=Eall
    59,      2,     28,      9,      1,     88,    125,     68,     67
    60,     28,     29,     10,      9,     89,    126,     69,    125
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*ELEMENT, TYPE=S6, ELSET=Eall
    80,     54,     60,      4,    144,    146,    119
*ELEMENT, TYPE=S8, ELSET=Eall
    81,      4,     60,     59,      3,    146,    148,    147,    108
    82,      3,     59,     58,     47,    147,    150,    149,    110
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
** Names based on load
*NSET,NSET=load
3,
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** Names based on mass
*ELSET,ELSET=mass
79,
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** Names based on beam
*ELSET,ELSET=beam
59,
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** Names based on fixed
*NSET,NSET=fixed
1,
2,
67,
** Surfaces based on all
*SURFACE, NAME=all
59, SPOS
78, SPOS
81, SPOS
82, SPOS
80, SPOS
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91, SPOS
** Surfaces based on beam
*SURFACE, NAME=beam
** Surfaces based on load
*SURFACE, NAME=load
81, SPOS
82, SPOS
80, SPOS
83, SPOS
84, SPOS
93, SPOS
79, SPOS
86, SPOS
85, SPOS
87, SPOS
90, SPOS
95, SPOS
94, SPOS
89, SPOS
92, SPOS
88, SPOS
91, SPOS
** Surfaces based on S6
*SURFACE, NAME=S6
** Surfaces based on fixed
*SURFACE, NAME=fixed
** Surfaces based on mass
*SURFACE, NAME=mass
** Surfaces based on S8R
*SURFACE, NAME=S8R

*MATERIAL,NAME=steel-no-dens
*ELASTIC
2.0000E+11,0.3


*DENSITY
0.0000E+00
*EXPANSION
0.0000E+00


*MATERIAL,NAME=steel
*ELASTIC
2.0000E+11,0.3


*DENSITY
7.8500E+03
*EXPANSION
0.0000E+00


*SHELL SECTION,MATERIAL=steel-no-dens,ELSET=beam,,OFFSET=0.0000E+00
5.0000E-02

*SHELL SECTION,MATERIAL=steel,ELSET=mass,,OFFSET=0.0000E+00
2.0000E-01

*BOUNDARY
fixed,1,1,0
fixed,2,2,0
fixed,3,3,0
fixed,5,5,0

*AMPLITUDE,NAME=Graph1
0,0.0000000E+00,
0.003003,1.8218914E-01,
0.006006,3.5827987E-01,
0.009009,5.2237790E-01,
0.012012,6.6899037E-01,
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3,7.2896863E-01,


*STEP
*STATIC


*DLOAD,
** Pressure based on load
81, P, 2.500000e+04
82, P, 2.500000e+04
80, P, 2.500000e+04
83, P, 2.500000e+04
84, P, 2.500000e+04
93, P, 2.500000e+04
79, P, 2.500000e+04
86, P, 2.500000e+04
85, P, 2.500000e+04
87, P, 2.500000e+04
90, P, 2.500000e+04
95, P, 2.500000e+04
94, P, 2.500000e+04
89, P, 2.500000e+04
92, P, 2.500000e+04
88, P, 2.500000e+04
91, P, 2.500000e+04


  *NODE FILE
u,
  *EL FILE
s,
*END STEP
