**1000 N as applied
**static deflection of this force is 4.84e-3 m

*NODE, NSET=Nall
       1,0.000000000000e+00,0.000000000000e+00,0.000000000000e+00
       2,1.000000000000e+00,0.000000000000e+00,0.000000000000e+00
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*ELEMENT, TYPE=B32, ELSET=Eall
     1,      1,     26,      4
     2,      4,     27,      5
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** Names based on load
*NSET,NSET=load
2,
3,
** Names based on mass
*ELSET,ELSET=mass
21,
22,
23,
24,
** Names based on beam
*ELSET,ELSET=beam
1,
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** Names based on B32
*ELSET,ELSET=B32R
1,
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** Names based on fixed
*NSET,NSET=fixed
1,

*MATERIAL,NAME=steel-no-dens
*ELASTIC
2.0000E+11,0.3


*DENSITY
0.0000E+00
*EXPANSION
0.0000E+00


*MATERIAL,NAME=steel
*ELASTIC
2.0000E+11,0.3


*DENSITY
7.8500E+03
*EXPANSION
0.0000E+00


*BEAM SECTION,MATERIAL=steel-no-dens,ELSET=beam,OFFSET1=0.0000E+00,OFFSET2=0.0000E+00,SECTION=rect
5.0000E-02,5.0000E-02
0.0000E+00,0.0000E+00,-1.0000E+00

*BEAM SECTION,MATERIAL=steel,ELSET=mass,OFFSET1=0.0000E+00,OFFSET2=0.0000E+00,SECTION=rect
2.0000E-01,2.0000E-01
0.0000E+00,0.0000E+00,-1.0000E+00

*BOUNDARY
fixed,1,1,0
fixed,2,2,0
fixed,3,3,0
fixed,4,4,0
fixed,5,5,0
fixed,6,6,0


*STEP
*STATIC

*CLOAD
load,3,-5.0000E+02


*NODE FILE
U
*EL FILE
S
*END STEP
