**1000 N as applied
**static deflection of this force is 4.83e-3 m

*NODE, NSET=Nall
       1,0.000000000000e+00,0.000000000000e+00,5.000000000000e-02
       2,0.000000000000e+00,0.000000000000e+00,0.000000000000e+00
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*ELEMENT, TYPE=C3D20, ELSET=Eall
   315,     1,     2,     4,     3,    36,    17,    55,    74,   210,   213,
         212,   211,   346,   384,   383,   403,   238,   218,   258,   278
   316,    36,    17,    55,    74,    37,    18,    56,    75,   346,   384,
         383,   403,   347,   385,   382,   404,   239,   219,   259,   279
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** Names based on C3D20
*ELSET,ELSET=C3D20
315,
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** Names based on tie1
*NSET,NSET=tie1
9,
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** Names based on tie2
*NSET,NSET=tie2
5,
6,
7,
8,
214,
215,
216,
217,
** Names based on load
*NSET,NSET=load
9,
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** Names based on mass
*ELSET,ELSET=mass
335,
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** Names based on beam
*ELSET,ELSET=beam
315,
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** Names based on fixed
*NSET,NSET=fixed
1,
2,
3,
4,
210,
211,
212,
213,
** Surfaces based on all
*SURFACE, NAME=all
315, S1
315, S3
315, S6
315, S4
315, S5
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341, S6
** Surfaces based on beam
*SURFACE, NAME=beam
** Surfaces based on load
*SURFACE, NAME=load
335, S6
347, S6
338, S6
350, S6
339, S6
343, S6
342, S6
346, S6
336, S6
337, S6
348, S6
349, S6
344, S6
345, S6
340, S6
341, S6
** Surfaces based on fixed
*SURFACE, NAME=fixed
315, S1
** Surfaces based on mass
*SURFACE, NAME=mass
** Surfaces based on tie1
*SURFACE, NAME=tie1
335, S1
383, S1
347, S1
395, S1
367, S1
351, S1
339, S1
343, S1
379, S1
363, S1
387, S1
391, S1
371, S1
375, S1
355, S1
359, S1
** Surfaces based on C3D20
*SURFACE, NAME=C3D20
** Surfaces based on tie2
*SURFACE, NAME=tie2
334, S2

*MATERIAL,NAME=steel-no-dens
*ELASTIC
2.0000E+11,0.3


*DENSITY
0.0000E+00
*EXPANSION
0.0000E+00

*SOLID SECTION,MATERIAL=steel-no-dens,ELSET=beam


*MATERIAL,NAME=mass
*ELASTIC
2.0000E+11,0.3


*DENSITY
7.8500E+03
*EXPANSION
0.0000E+00

*SOLID SECTION,MATERIAL=mass,ELSET=mass

*BOUNDARY
fixed,1,1,0
fixed,2,2,0
fixed,3,3,0

*TIE,NAME=T0,POSITION TOLERANCE=0
tie2,tie1


*STEP
*STATIC


*DLOAD
** Pressure based on load
335, P6, 2.500000e+04
347, P6, 2.500000e+04
338, P6, 2.500000e+04
350, P6, 2.500000e+04
339, P6, 2.500000e+04
343, P6, 2.500000e+04
342, P6, 2.500000e+04
346, P6, 2.500000e+04
336, P6, 2.500000e+04
337, P6, 2.500000e+04
348, P6, 2.500000e+04
349, P6, 2.500000e+04
344, P6, 2.500000e+04
345, P6, 2.500000e+04
340, P6, 2.500000e+04
341, P6, 2.500000e+04

  *NODE FILE
U,
  *EL FILE
S,
*END STEP
