**Mass on springs on structure)
**<img src="eos.png">

*node, nset=Nall
1, 0.000000e+00, 0.000000e+00, 2.000000e-01
2, 0.000000e+00, 0.000000e+00, 0.000000e+00
3, 0.000000e+00, 1.000000e+00, 2.000000e-01
4, 0.000000e+00, 1.000000e+00, 0.000000e+00
5, 6.000000e+00, 0.000000e+00, 2.000000e-01
6, 6.000000e+00, 0.000000e+00, 0.000000e+00
7, 6.000000e+00, 1.000000e+00, 2.000000e-01
8, 6.000000e+00, 1.000000e+00, 0.000000e+00
9, 5.000000e+00, 0.000000e+00, 1.500000e+00
10, 5.000000e+00, 0.000000e+00, 5.000000e-01
11, 5.000000e+00, 1.000000e+00, 1.500000e+00
12, 5.000000e+00, 1.000000e+00, 5.000000e-01
13, 6.000000e+00, 0.000000e+00, 1.500000e+00
14, 6.000000e+00, 0.000000e+00, 5.000000e-01
15, 6.000000e+00, 1.000000e+00, 1.500000e+00
16, 6.000000e+00, 1.000000e+00, 5.000000e-01
17, 5.000000e+00, 2.000000e+00, 1.300000e+00
18, 5.000000e+00, 2.000000e+00, 3.000000e-01
19, 5.000000e+00, 3.000000e+00, 1.300000e+00
20, 5.000000e+00, 3.000000e+00, 3.000000e-01
21, 6.000000e+00, 2.000000e+00, 1.300000e+00
22, 6.000000e+00, 2.000000e+00, 3.000000e-01
23, 6.000000e+00, 3.000000e+00, 1.300000e+00
24, 6.000000e+00, 3.000000e+00, 3.000000e-01
25, 1.000000e+00, 0.000000e+00, 0.000000e+00
26, 2.000000e+00, 0.000000e+00, 0.000000e+00
27, 3.000000e+00, 0.000000e+00, 0.000000e+00
28, 4.000000e+00, 0.000000e+00, 0.000000e+00
29, 5.000000e+00, 0.000000e+00, 0.000000e+00
30, 1.000000e+00, 0.000000e+00, 2.000000e-01
31, 2.000000e+00, 0.000000e+00, 2.000000e-01
32, 3.000000e+00, 0.000000e+00, 2.000000e-01
33, 4.000000e+00, 0.000000e+00, 2.000000e-01
34, 5.000000e+00, 0.000000e+00, 2.000000e-01
35, 1.000000e+00, 1.000000e+00, 0.000000e+00
36, 2.000000e+00, 1.000000e+00, 0.000000e+00
37, 3.000000e+00, 1.000000e+00, 0.000000e+00
38, 4.000000e+00, 1.000000e+00, 0.000000e+00
39, 5.000000e+00, 1.000000e+00, 0.000000e+00
40, 1.000000e+00, 1.000000e+00, 2.000000e-01
41, 2.000000e+00, 1.000000e+00, 2.000000e-01
42, 3.000000e+00, 1.000000e+00, 2.000000e-01
43, 4.000000e+00, 1.000000e+00, 2.000000e-01
44, 5.000000e+00, 1.000000e+00, 2.000000e-01
45, 0.000000e+00, 0.000000e+00, 1.000000e-01
46, 0.000000e+00, 5.000000e-01, 2.000000e-01
47, 0.000000e+00, 1.000000e+00, 1.000000e-01
48, 0.000000e+00, 5.000000e-01, 0.000000e+00
49, 6.000000e+00, 0.000000e+00, 1.000000e-01
50, 6.000000e+00, 5.000000e-01, 2.000000e-01
51, 6.000000e+00, 1.000000e+00, 1.000000e-01
52, 6.000000e+00, 5.000000e-01, 0.000000e+00
53, 5.000000e-01, 0.000000e+00, 0.000000e+00
54, 1.500000e+00, 0.000000e+00, 0.000000e+00
55, 2.500000e+00, 0.000000e+00, 0.000000e+00
56, 3.500000e+00, 0.000000e+00, 0.000000e+00
57, 4.500000e+00, 0.000000e+00, 0.000000e+00
58, 5.500000e+00, 0.000000e+00, 0.000000e+00
59, 5.000000e-01, 0.000000e+00, 2.000000e-01
60, 1.500000e+00, 0.000000e+00, 2.000000e-01
61, 2.500000e+00, 0.000000e+00, 2.000000e-01
62, 3.500000e+00, 0.000000e+00, 2.000000e-01
63, 4.500000e+00, 0.000000e+00, 2.000000e-01
64, 5.500000e+00, 0.000000e+00, 2.000000e-01
65, 5.000000e-01, 1.000000e+00, 0.000000e+00
66, 1.500000e+00, 1.000000e+00, 0.000000e+00
67, 2.500000e+00, 1.000000e+00, 0.000000e+00
68, 3.500000e+00, 1.000000e+00, 0.000000e+00
69, 4.500000e+00, 1.000000e+00, 0.000000e+00
70, 5.500000e+00, 1.000000e+00, 0.000000e+00
71, 5.000000e-01, 1.000000e+00, 2.000000e-01
72, 1.500000e+00, 1.000000e+00, 2.000000e-01
73, 2.500000e+00, 1.000000e+00, 2.000000e-01
74, 3.500000e+00, 1.000000e+00, 2.000000e-01
75, 4.500000e+00, 1.000000e+00, 2.000000e-01
76, 5.500000e+00, 1.000000e+00, 2.000000e-01
77, 5.000000e+00, 0.000000e+00, 1.000000e+00
78, 5.000000e+00, 5.000000e-01, 1.500000e+00
79, 5.000000e+00, 1.000000e+00, 1.000000e+00
80, 5.000000e+00, 5.000000e-01, 5.000000e-01
81, 6.000000e+00, 0.000000e+00, 1.000000e+00
82, 6.000000e+00, 5.000000e-01, 1.500000e+00
83, 6.000000e+00, 1.000000e+00, 1.000000e+00
84, 6.000000e+00, 5.000000e-01, 5.000000e-01
85, 5.500000e+00, 0.000000e+00, 5.000000e-01
86, 5.500000e+00, 0.000000e+00, 1.500000e+00
87, 5.500000e+00, 1.000000e+00, 5.000000e-01
88, 5.500000e+00, 1.000000e+00, 1.500000e+00
89, 5.000000e+00, 2.000000e+00, 8.000000e-01
90, 5.000000e+00, 2.500000e+00, 1.300000e+00
91, 5.000000e+00, 3.000000e+00, 8.000000e-01
92, 5.000000e+00, 2.500000e+00, 3.000000e-01
93, 6.000000e+00, 2.000000e+00, 8.000000e-01
94, 6.000000e+00, 2.500000e+00, 1.300000e+00
95, 6.000000e+00, 3.000000e+00, 8.000000e-01
96, 6.000000e+00, 2.500000e+00, 3.000000e-01
97, 5.500000e+00, 2.000000e+00, 3.000000e-01
98, 5.500000e+00, 2.000000e+00, 1.300000e+00
99, 5.500000e+00, 3.000000e+00, 3.000000e-01
100, 5.500000e+00, 3.000000e+00, 1.300000e+00
101, 1.000000e+00, 0.000000e+00, 1.000000e-01
102, 2.000000e+00, 0.000000e+00, 1.000000e-01
103, 3.000000e+00, 0.000000e+00, 1.000000e-01
104, 4.000000e+00, 0.000000e+00, 1.000000e-01
105, 5.000000e+00, 0.000000e+00, 1.000000e-01
106, 5.000000e+00, 1.000000e+00, 1.000000e-01
107, 4.000000e+00, 1.000000e+00, 1.000000e-01
108, 3.000000e+00, 1.000000e+00, 1.000000e-01
109, 2.000000e+00, 1.000000e+00, 1.000000e-01
110, 1.000000e+00, 1.000000e+00, 1.000000e-01
111, 1.000000e+00, 5.000000e-01, 0.000000e+00
112, 2.000000e+00, 5.000000e-01, 0.000000e+00
113, 3.000000e+00, 5.000000e-01, 0.000000e+00
114, 4.000000e+00, 5.000000e-01, 0.000000e+00
115, 5.000000e+00, 5.000000e-01, 0.000000e+00
116, 1.000000e+00, 5.000000e-01, 2.000000e-01
117, 2.000000e+00, 5.000000e-01, 2.000000e-01
118, 3.000000e+00, 5.000000e-01, 2.000000e-01
119, 4.000000e+00, 5.000000e-01, 2.000000e-01
120, 5.000000e+00, 5.000000e-01, 2.000000e-01
*nset, nset=fixed
1, 2, 3, 4, 45, 46, 47,
48,
*element, elset=Eall,type=C3D20
95, 1, 2, 4, 3, 30, 25, 35, 40, 45, 48, 47, 46, 101,
111, 110, 116, 59, 53, 65, 71,
96, 30, 25, 35, 40, 31, 26, 36, 41, 101, 111, 110, 116, 102,
112, 109, 117, 60, 54, 66, 72,
97, 31, 26, 36, 41, 32, 27, 37, 42, 102, 112, 109, 117, 103,
113, 108, 118, 61, 55, 67, 73,
98, 32, 27, 37, 42, 33, 28, 38, 43, 103, 113, 108, 118, 104,
114, 107, 119, 62, 56, 68, 74,
99, 33, 28, 38, 43, 34, 29, 39, 44, 104, 114, 107, 119, 105,
115, 106, 120, 63, 57, 69, 75,
100, 34, 29, 39, 44, 5, 6, 8, 7, 105, 115, 106, 120, 49,
52, 51, 50, 64, 58, 70, 76,
101, 9, 10, 12, 11, 13, 14, 16, 15, 77, 80, 79, 78, 81,
84, 83, 82, 86, 85, 87, 88,
102, 17, 18, 20, 19, 21, 22, 24, 23, 89, 92, 91, 90, 93,
96, 95, 94, 98, 97, 99, 100,

*elset, elset=beam
95, 96, 97, 98, 99, 100,
*elset, elset=mass1
101,
*elset, elset=mass2
102,

**additional nodes
*node,nset=solidbase
151, 5.000000e+00, 2.000000e+00, 0
152, 5.000000e+00, 3.000000e+00, 0
153, 6.000000e+00, 2.000000e+00, 0
154, 6.000000e+00, 3.000000e+00, 0

*nset,NSET=lateralsupport_y
11,12,15,16,19,20,23,24,
*nset,NSET=lateralsupport_x
9,11,17,19,18,20,10,12


*ELEMENT,TYPE=SPRINGA,elset=spr
200,151,18
201,152,20
202,153,22
203,154,24
204,5,14
205,34,10
206,7,16
207,44,12

*MATERIAL,NAME=steel
*ELASTIC
2e11,0.3

*DENSITY
7850


*SOLID SECTION,MATERIAL=steel,ELSET=Eall

*SPRING,elset=spr

1000.,


*BOUNDARY
fixed,1,3,0
solidbase,1,3,0
lateralsupport_x,1,1,0
lateralsupport_y,2,2,0


*STEP
*FREQUENCY
3


*NODE FILE
U


*END STEP
