**Engine Start and Stop
** See files in the folder
**<img src="startstop.png">

*NODE, NSET=Nall
       1,0.000000000000e+00,0.000000000000e+00,0.000000000000e+00
       2,1.000000000000e+00,0.000000000000e+00,0.000000000000e+00
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*ELEMENT, TYPE=B32R, ELSET=Eall
     1,      1,     26,      4
     2,      4,     27,      5
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** Names based on load
*NSET,NSET=load
2,
3,
** Names based on mass
*ELSET,ELSET=mass
21,
22,
23,
24,
** Names based on beam
*ELSET,ELSET=beam
1,
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** Names based on B32
*ELSET,ELSET=B32R
1,
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** Names based on fixed
*NSET,NSET=fixed
1,


*AMPLITUDE,NAME=Graph1
0	,	0	,
0.0033270048	,	1.52465027583405E-06	,
0.0066540096	,	6.09860109445699E-06	,
0.0099810144	,	1.37218523759559E-05	,
0.0133080192	,	2.43944038095581E-05	,
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16.6350240484	,	0	,


*MATERIAL,NAME=steel-no-dens
*ELASTIC
2.0000E+11,0.3


*MATERIAL,NAME=steel
*ELASTIC
2.0000E+11,0.3

*DENSITY
7.8500E+03


*BEAM SECTION,MATERIAL=steel-no-dens,ELSET=beam,OFFSET1=0.0000E+00,OFFSET2=0.0000E+00,SECTION=rect
1.91E-02,1.91E-02
0,1,0

*BEAM SECTION,MATERIAL=steel,ELSET=mass,OFFSET1=0.0000E+00,OFFSET2=0.0000E+00,SECTION=rect
4.0000E-01,4.0000E-01
0,1,0


*BOUNDARY
1,1,3,0
4,1,3,0


*STEP
*FREQUENCY,SOLVER=ARPACK,STORAGE=YES
3


*CLOAD
load,3,0

*NODE FILE
U,
*END STEP
*STEP, inc=1000000
*MODAL DYNAMIC
0.01,16.6


*MODAL DAMPING
1,3,0.01

*CLOAD,AMPLITUDE=Graph1
load,3,-1.1000E+02

*NODE FILE
U,
*EL FILE
S,
*END STEP
