** Harmonic for damping ratio 0.01 (steel avg stressed)


*NODE, NSET=Nall
       1,0.000000000000e+00,0.000000000000e+00,0.000000000000e+00
       2,1.000000000000e+00,0.000000000000e+00,0.000000000000e+00
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*ELEMENT, TYPE=B32, ELSET=Eall
     1,      1,     26,      4
     2,      4,     27,      5
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** Names based on load
*NSET,NSET=load
2,
3,
** Names based on mass
*ELSET,ELSET=mass
21,
22,
23,
24,
** Names based on beam
*ELSET,ELSET=beam
1,
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** Names based on B32
*ELSET,ELSET=B32R
1,
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** Names based on fixed
*NSET,NSET=fixed
1,

*MATERIAL,NAME=steel-no-dens
*ELASTIC
2.0000E+11,0.3


*DENSITY
0.0000E+00
*EXPANSION
0.0000E+00


*MATERIAL,NAME=steel
*ELASTIC
2.0000E+11,0.3


*DENSITY
7.8500E+03
*EXPANSION
0.0000E+00


*BEAM SECTION,MATERIAL=steel-no-dens,ELSET=beam,OFFSET1=0.0000E+00,OFFSET2=0.0000E+00,SECTION=rect
1.91E-02,1.91E-02
0,1,0

*BEAM SECTION,MATERIAL=steel,ELSET=mass,OFFSET1=0.0000E+00,OFFSET2=0.0000E+00,SECTION=rect
4.0000E-01,4.0000E-01
0,1,0

*BOUNDARY
fixed,1,6,0


*STEP
*FREQUENCY,SOLVER=ARPACK,STORAGE=YES
3

**load should be applied at this step too for beam elements
*CLOAD
load,3,-1.1000E+02


*END STEP
*STEP


*STEADY STATE DYNAMICS,HARMONIC=YES
0.1,2.5
*MODAL DAMPING
1,3,0.01

*CLOAD
load,3,-1.1000E+02

  *NODE FILE
PU,
  *EL FILE
PHS,
*END STEP
